# Natural Math and Units in Mathcad
#
# This Mathcad worksheet explores two distinguishing features of Mathcad that are critical to performing engineering calculations clearly and accurately.  These two features are Natural Math Notation and Units Intelligence.
#
# This worksheet is partitioned into three sections.  Within each section, we consider a simple case from the disciplines of structural, mechanical, and electrical engineering.  The three sections of this worksheet are:
# - Discussion
# - Overview of Natural Math Notation and Units Intelligence in Mathcad
# -
# - Case Examples: Step-by-Step
# - Step-by-step examples on working with Natural Math Notation and Units Intelligence
# -
# - Case Appendices: Streamlined Calculations
# - Condensed versions of the case examples without discussion or step-by-step guide, so that changes to calculated results can easily be seen when inputs are modified.
# Discussion
# Natural Math Notation
# Natural Math Notation refers to the notion of representing formulas and equations in their native mathematical format.  The cases below show basic equations from structural, mechanical, and electrical disciplines.  Notice that Mathcad writes these equations in their natural, authentic formats.  Mathcad applies this approach to all engineering math, and never uses script, code, or strings of characters to represent math expressions.
#
# To write expressions such as the ones below, we use operators from the Operators panel and symbols/characters from the Symbols panel, in conjunction with input from the keyboard (i.e. numeric values, addition, subtraction, multiplication, division operators, etc).  The Operators panel and Symbols panel are located on the Mathcad ribbon:
# Math tab/Operators button
# Math tab/Symbols button
# Case 1:  Deflection of a beam at position x  as a load W is placed at position a  along the beam
# Equation for calculating deflection at position x on the beam when a load is placed at position a along the beam
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y(x) == -W*(L - a)*x/(6*E*I*L)*(L^2 - (L - a)^2 - x^2) - (x > a)*(W/(6*E*I)*(x - a)^3)
# Case 2:  Surface area of a threaded bolt
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# Equation for calculating the surface area of a threaded bolt
A_surface == 2*π*(D - d)*l/(p*cos(α_T/2))
# Case 3:  Power dissipated across a resistor over time t
# Equations for calculating the power dissipated across a resistor in an electrical circuit at time t
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I == i(t) == I_o*e^(-t/τ)  # current as a function of time
P(I) == I^2*R  # power dissipated across a resistor at calculated value I (current)
# Note: In the formulas above, we did not use the definition operator to define the equations.  Instead, we used a heavy bold equal sign.  This heavy bold equal sign is called the boolean equal sign, and can be used to document formulas and math expressions that will not be calculated at that point in the worksheet.  In order to calculate these formulas and obtain numerical results, we will redefine these same formulas below using the definition operator (instead of the boolean equal sign).
# - The boolean equal sign is located here on the ribbon: Math tab/Operators button/Comparison section/=  The keyboard shortcut for the boolean equal sign is <Ctrl><=>
# -
# - It is not necessary to define the math expressions twice as we will do in this worksheet.  We are defining them twice within this worksheet (using the boolean equal sign above and the definition operator below) only for purposes of documentation and clarity.
# Natural Math Notation Help
# For help with entering and editing expressions using Natural Math Notation, please refer to the Tutorial located here:
# From the Mathcad ribbon: Resources tab/Tutorial/Getting started/Task 2-1 & Task 2-2
# Units Intelligence
# Mathcad provides a library of units, and understands how to incorporate units into calculations. When units are included on input variables, Mathcad recognizes the units and processes them according to the fundamental laws of units.
#
# Mathcad's units intelligence provides the following capabilities when working with units:
# - Carries units forward throughout all calculations
# - Converts units on numerical results
# - Flags unit-related errors
# Notes on how Mathcad calculates answers with units:
# - Mathcad will provide the numerical answer in the simplified base unit for the given unit dimension within the given unit system. The default unit system is the SI system.
# Example: For the dimension of length, the calculated answer will be provided in meters (SI system)
# Example: For the dimension of force, the calculated answer will be provided in newtons (SI system)
# Example: For the dimension of power, the calculated answer will be provided in watts (SI system)
#
# - Once the answer is calculated, we can convert the answer to the desired units by replacing the default unit in the answer with the desired unit.
# The library of units is located here on the Mathcad ribbon: Math tab/Units button
# Units Help
# For help with working with Units, please refer to the Units Section.
# From the Mathcad ribbon: Resources tab/Help/Units Section
# Case Examples: Step-by-Step
# For each case above, we'll perform the calculation according to the formula written in Natural Math Notation, then convert the units on the result according to the following steps:
#
# 1.  Define input variables with units
#
# To add units, simply type the numeric value followed by the unit.
# - Do not enter a space in-between the number and the unit.
# - You may enter the multiplication operator between the number and the unit (* on keyboard).
# - Look here for a complete list of available units and their proper formats:  Math tab/Units button
# 2.  Write the formula using the definition operator (instead of the boolean equal sign - remember: we used the boolean equal sign above to document the formulas for discussion purposes and now to calculate, we need to rewrite the formulas using the definition operator).
#
# To define formulas/equations, we use the definition operator, which is represented by the := symbol
# - The definition operator is located on the Mathcad Ribbon here: Math tab/Operators button/Definition and Evaluation section/:=
# - The keyboard shortcut for the definition operator is colon character :
# 3.  Execute the calculation to obtain a numerical answer
#
# To view numerical results, type the variable name or function name (with its required inputs) followed directly by the regular equal sign =
# - Do not use the definition operator :=  to view results.  The definition operator is used only for defining things, or making assignments.
# 4.  Convert the answer to desired units
#
# To convert units on the results, delete the default units in the answer, and replace with the desired units.
# - The desired units must be entered according to their proper format.  Refer to the units library to find the proper format for the unit of interest: From the Mathcad ribbon: Math tab/Units button
# -
# Case 1:  Deflection of a beam at position x  as a load W is placed at position a  along the beam
# Step 1.  Define input variables with units
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L := 15 m  # total beam length
a := 11 m  # load position
E := 69 GPa  # Young's modulus
I := 20 in^4  # area moment of inertia
W := 200 N  # load weight/force
# Step 2.  Write the formula using the definition operator
y(x) := -W*(L - a)*x/(6*E*I*L)*(L^2 - (L - a)^2 - x^2) - (x > a)*(W/(6*E*I)*(x - a)^3)
# Step 3.  Execute the calculation with the defined inputs at the midpoint and at the load position
midpoint := L/2
midpoint = 7.5 m
y(midpoint) = -0.0177287 m
y(a) = -0.0149799 m
# Step 4.  Convert the answer to desired units, and assign the results to variables
y_midpoint := y(midpoint) = -17.7287 mm
y_loadposition := y(a) = -14.9799 mm
# Case 2:  Surface area of a threaded bolt
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# Step 1.  Define input variables with units
d := 0.86 mm  # Thread depth
l := 100 mm  # Length of threaded part of bolt
α_T := 60 deg  # Thread angle (60deg for ISO)
D := 4 mm  # Nominal diameter
p := 1.25  # Coarse thread pitch (unitless)
# Step 2.  Write the formula using the definition operator
A_surface := 2*π*(D - d)*l/(p*cos(α_T/2))
# Step 3.  Execute the calculation with the defined inputs
A_surface = 0.00182251 m^2
# Step 4.  Convert the answer to desired units
A_surface = 1822.51 mm^2
A_surface = 18.2251 cm^2
A_surface = 2.82489 in^2
# Case 3:  Power dissipated across a resistor over time t
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# Step 1.  Define input variables with units
I_o := 30 mA  # initial current
R := 200 Ω  # resistor
τ := 5 s  # time constant
# Step 2.  Write the formulas using the definition operator
i(t) := I_o*e^(-t/τ)  # current as a function of time
# power dissipation across resistor at calculated value for I (current at time t)
P(I) := I^2*R
# Step 3.  Execute the calculation with the defined inputs at a chosen time t
t := 10 ms
I := i(t) = 0.0299401 A
P(I) = 0.179281 W
# Step 4.  Convert the answer to desired units, and assign the power result to a variable
I = 29.9401 mA
R_power_dissipation := P(I) = 179.281 mW
# Case Appendices: Streamlined Calculations
# Case 1:  Deflection of a beam at position x  as a load W is placed at position a  along the beam
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L := 15 m  # total beam length
a := 11 m  # load position
E := 69 GPa  # Young's modulus
I := 20 in^4  # area moment of inertia
W := 200 N  # load weight/force
y(x) := -W*(L - a)*x/(6*E*I*L)*(L^2 - (L - a)^2 - x^2) - (x > a)*(W/(6*E*I)*(x - a)^3)
y(L/2) = -0.0177287 m
y(a) = -0.0149799 m
y_midpoint := y(L/2) = -17.7287 mm
y_loadposition := y(a) = -14.9799 mm
# Now, define x as a sequence of inputs with a starting value of 0 m, an ending value of L, and a step size of 0.1 m so that we can plot the deflection along the beam.
x := 0 m, 0.1 m .. L
# [plot: y(x) (mm) vs x]
# Native Mathcad 2D plots can be inserted from the Plots tab
# Note that for the 2D plot you can also use the Chart Component, an application that makes possible the adding of more customization, such as: title, legend, second Y axis, gridlines, border, background, formatting the axes, tick marks and values for tick marks and more.
# [chart]
    X[1] := x/m
    Y[1] := y(x)/mm
# Chart Component 2D plots can be inserted from the Math tab
# Case 2:  Surface area of a threaded bolt
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d := 0.86 mm  # Thread depth
l := 100 mm  # Length of threaded part of bolt
α_T := 60 deg  # Thread angle (60deg for ISO)
D := 4 mm  # Nominal diameter
p := 1.25  # Coarse thread pitch (unitless)
A_surface := 2*π*(D - d)*l/(p*cos(α_T/2))
A_surface = 0.00182251 m^2
A_surface = 1822.51 mm^2
A_surface = 18.2251 cm^2
A_surface = 2.82489 in^2
# Case 3:  Power dissipated across a resistor over time t
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R := 200 Ω  # resistor
t := 25 ms
I_o := 30 mA  # initial current
τ := 5 s  # time constant
i(t) := I_o*e^(-t/τ)
P(I) := I^2*R
I := i(t) = 29.8504 mA
R_power_dissipation := P(I) = 178.209 mW
# Now, define t as a sequence of inputs with a starting value of 0 ms, an ending value of 100 ms, and a step size of 5 ms so that we can plot current against time.
t := 0 ms, 5 ms .. 100 ms
# [chart]
    X[1] := t/ms
    Y[1] := i(t)/mA
# [plot: i(t) (mA) vs t (ms)]
# Note: In the native 2D plots, we enter units of ms into the units placeholder on the x-axis and units of mA into the units placeholder on the y-axis.  If other units are desired within the plot, then replace the units of ms and mA with the desired units.
# Note: In the Chart Component plot, unit scaling is done by dividing the X and Y expressions by ms on the x-axis and by mA on the y-axis. If other units are desired within the plot, then replace the units of ms and mA with the desired units.
# Thank you for your interest in PTC Mathcad!
