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# CALCULUS REFERENCE FORMULAS
# reference tables
# Table of Derivative Formulas
# Constant Multiple Rule
d/dx(c*f(x)) == c*d/dx(f(x))
# Power Rule
d/dx(x^n) == n*x^(n - 1)
# Product Rule
d/dx(f(x)*g(x)) == f(x)*d/dx(g(x)) + g(x)*d/dx(f(x))
# Sum Rule
d/dx(f(x) + g(x)) == d/dx(f(x)) + d/dx(g(x))
# Quotient Rule
d/dx(f(x)/g(x)) == (g(x)*d/dx(f(x)) - f(x)*d/dx(g(x)))/g(x)^2
# Chain Rule
y == f(u)
u == g(x)
d/dx(f(u)) == (d/du(f(u)))*(d/dx(g(x)))
# Derivatives of Trigonometric Functions
d/dx(sin(x)) == cos(x)
d/dx(cos(x)) == -sin(x)
d/dx(tan(x)) == sec(x)^2
d/dx(cot(x)) == -csc(x)^2
d/dx(sec(x)) == sec(x)*tan(x)
d/dx(csc(x)) == -csc(x)*cot(x)
# Derivatives of Logarithms and Exponential Functions
d/dx(ln(|x|)) == 1/x
d/dx(e^x) == e^x
d/dx(a^x) == a^x*ln(a)
a > 0
# Derivatives of Inverse Trigonometric Functions
d/dx(asin(x)) == 1/sqrt(1 - x^2)
d/dx(atan(x)) == 1/(1 + x^2)
d/dx(acos(x)) == -1/sqrt(1 - x^2)
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