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# CALCULUS REFERENCE FORMULAS
# reference tables
# Table of Integral Formulas
# Basic Integrals
integral(x^n, x) → x^(n + 1)/(n + 1)
n ≠ -1
integral(a, x) → a*x
integral(1/x, x) → ln(x)
integral(f(x) + g(x), x) expand → integral(f(x), x) + integral(g(x), x)
# Integrals of Trigonometric Functions
integral(sin(x), x) → -cos(x)
integral(cos(x), x) → sin(x)
integral(tan(x), x) → -ln(cos(x))
integral(sec(x), x) → ln(tan(x) + 1/cos(x))
integral(csc(x), x) → ln(tan(x/2))
integral(cot(x), x) → ln(sin(x))
# Integration by Parts
integral(u, v) == u*v - integral(v, u)
# Integrals of Exponential and Logarithmic Functions
integral(a^x, x) → a^x/ln(a)
a > 0
a ≠ 1
integral(e^x, x) → e^x
# Integrals Containing a^2 ± x^2
integral(1/(a^2 + x^2), x) → atan(x/a)/a
integral(1/sqrt(a^2 - x^2), x) assume, a > x → asin(x/a)
integral(sqrt(a^2 - x^2), x) assume, a > x; simplify → x*sqrt(a^2 - x^2)/2 + a^2*asin(x/|a|)/2
integral(1/(a^2 - x^2), x) assume, a > x → ln(a + x)/(2*a) - ln(x - a)/(2*a)
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