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# CALCULUS REFERENCE FORMULAS
# reference tables
# Table of Integral Formulas
# Basic Integrals
integral(x^n, x) == x^(n + 1)/(n + 1) + C
n ≠ -1
integral(a, x) == a*x + C
integral(1/x, x) == ln(|x|) + C
integral(f(x) + g(x), x) == integral(f(x), x) + integral(g(x), x)
# Integrals of Trigonometric Functions
integral(sin(x), x) == -cos(x) + C
integral(cos(x), x) == sin(x) + C
integral(tan(x), x) == ln(|sec(x)|) + C
integral(sec(x), x) == ln(|sec(x) + tan(x)|) + C
integral(csc(x), x) == ln(|csc(x) - cot(x)|) + C
integral(cot(x), x) == ln(|sin(x)|) + C
# Integration by Parts
integral(u, v) == u*v - integral(v, u)
# Integrals of Exponential and Logarithmic Functions
integral(a^x, x) == a^x/ln(a) + C
a > 0
a ≠ 1
integral(e^x, x) == e^x + C
# Integrals Containing a^2 ± x^2
integral(1/(a^2 + x^2), x) == 1/a*atan(x/a) + C
integral(1/sqrt(a^2 - x^2), x) == asin(x/a) + C
integral(sqrt(a^2 - x^2), x) == x/2*sqrt(a^2 - x^2) + a^2/2*asin(x/a) + C
integral(1/(a^2 - x^2), x) == 1/(2*a)*ln(|(x + a)/(x - a)|) + C
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