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# CALCULUS REFERENCE FORMULAS
# reference tables
# Trigonometric Identities
# Basic Identities
sin(x)/cos(x) simplify → tan(x)
sin(x)^2 + cos(x)^2 simplify → 1
# Complex Identities
sin(z) rewrite, e → -e^(z*1i)*1i/2 + e^(-(z*1i))*1i/2
cos(z) rewrite, e → e^(-(z*1i))/2 + e^(z*1i)/2
e^(1i*z) rewrite, cos → cos(z) + sin(z)*1i
e^(x + 1i*y) rewrite, cos → cos(y - x*1i) + sin(y - x*1i)*1i
ln(x + 1i*y) == ln(|x + 1i*y|) + 1i*atan(y/x) + 2.0i*π
# Hyperbolic Functions and Exponentials
sinh(x) rewrite, e → e^x/2 - e^(-x)/2
csch(x) → 1/sinh(x)
cosh(x) rewrite, e → e^(-x)/2 + e^x/2
sech(x) → 1/cosh(x)
tanh(x) rewrite, e → (e^(2*x) - 1)/(e^(2*x) + 1)
coth(x) rewrite, tanh → 1/tanh(x)
# Hyperbolic Functions and Trig Relationships
sinh(z) rewrite, sin → -(sin(z*1i)*1i)
csch(z) rewrite, sin → 1i/sin(z*1i)
cosh(z) rewrite, cos → cos(z*1i)
sech(z) rewrite, cos → 1/cos(z*1i)
tanh(z) rewrite, tan → -(tan(z*1i)*1i)
coth(z) rewrite, tan → 1i/tan(z*1i)
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