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# CALCULUS REFERENCE FORMULAS
# reference tables
# Trigonometric Identities
# Basic Identities
sin(x)/cos(x) == tan(x)
sin(x)^2 + cos(x)^2 simplify → 1
# Complex Identities
sin(z) == (e^(1i*z) - e^(-1i*z))/2i
cos(z) == (e^(1i*z) + e^(-1i*z))/2
e^(1i*z) == cos(z) + 1i*sin(z)
e^(x + 1i*y) == e^x*(cos(y) + 1i*sin(y))
ln(x + 1i*y) == ln(|x + 1i*y|) + 1i*atan(y/x) + 2.0i*π
# Hyperbolic Functions and Exponentials
sinh(x) == (e^x - e^(-x))/2
csch(x) == 1/sinh(x)
cosh(x) == (e^x + e^(-x))/2
sech(x) == 1/cosh(x)
tanh(x) == (e^x - e^(-x))/(e^x + e^(-x))
coth(x) == 1/tanh(x)
# Hyperbolic Functions and Trig Relationships
sinh(z) == -1i*sin(1i*z)
csch(z) == 1i/sin(1i*z)
cosh(z) == cos(1i*z)
sech(z) == 1/cos(1i*z)
tanh(z) == -1i*tan(1i*z)
coth(z) == 1i/tan(1i*z)
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