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# CAPACITANCE
# reference tables
# Coaxial Cylinders
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# Capacitance:
2*π*ε*d/ln(r_2/r_1)
# Example: Determine the capacitance of two coaxial cylinders given the inner and outer radii, the length of the cylinders, d, and the permittivity of the material, ε.
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r_1 := 1*mm
r_2 := 3*mm
d := 20*mm
ε := 2.6562*10^-11*F/m  # Permittivity of rubber
C := 2*π*ε*d/ln(r_2/r_1)
C = 3.03827e-12 F
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