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# CAPACITANCE
# reference tables
# Isolated Sphere
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# Capacitance:
4*π*ε*r
# Example: Determine the capacitance of an isolated sphere given its radius, r and the permittivity of the material, ε.
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r := 18*in
ε := 8.854*10^-12*F/m  # Permittivity of free space
C := 4*π*ε*r
C = 5.08693e-11 F
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