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# OSCILLATORS
# reference tables
# Colpitts
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# Gain requirement:
A_v ≥ C_2/C_1
# Frequency of oscillation (radians/sec):
sqrt((C_1 + C_2)/(L*C_1*C_2))
# Example: Find the frequency of oscillation of a Colpitts oscillator with capacitances C1 and C2 and
# inductance L.
C_1 := 0.004*μF
C_2 := 0.03*μF
L := 4*mH
# Frequency of oscillation in radians per second
ωο_ο := sqrt((C_1 + C_2)/(L*C_1*C_2))
f_o := ωο_ο/(2*π)  # Frequency in hertz
f_o = 42.3583 kHz
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