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# OSCILLATORS
# reference tables
# Pierce
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# Gain requirement:
A_v ≥ 1
# Frequency of oscillation (radians/sec):
1/sqrt(L*C)
# Example: Find the frequency of oscillation of a Pierce oscillator with inductance L and capacitance C.
L := 5.0*mH
C := 0.015*μF
ωο_ο := 1/sqrt(L*C)  # Frequency of oscillation in radians per second
f_o := ωο_ο/(2*π)  # Frequency in hertz
f_o = 18.3776 kHz
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