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# PROPERTIES OF GASES
# reference tables
# Specific Gravity
# Specific Gravity | Specific Gravity
# Gas | Gas
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# Acetylene | 0.90 | Hydrogen (H_2) | 0.070
# Air (mixture) | 1.00 | Hydrogen chloride (HCl) | 1.26
# Ammonia (NH_3) | 0.59 | Hydrogen sulfide (H_2S) | 1.18
# Argon (Ar) | 1.38 | Krypton (Kr) | 2.89
# Butadiene (C_4H_6) | 1.87 | Methane (CH_4) | 0.554
# n-Butane, Isobutane (C_4H_10) | 2.07 | Methyl chloride (CH_3Cl) | 1.74
# 1-Butene (butylene) (C_4H_8) | 1.94 | Neon (Ne) | 0.697
# Carbon dioxide (CO_2) | 1.52 | Nitric oxide (NO) | 1.04
# Carbon monoxide (CO) | 0.967 | Nitrogen (N_2) | 0.967
# Chlorine (Cl_2) | 2.45 | Nitrous oxide (N_2O) | 1.52
# Deuterium (D_2) | 0.070 | Oxygen (O_2) | 1.105
# Ethane (C_2H_6) | 1.04 | Ozone (O_3) | 1.66
# Ethyl chloride (C_2H_5Cl) | 2.23 | Propane (C_3H_8) | 1.52
# Ethylene (ethene) (C_2H_4) | 0.969 | Propylene (C_3H_6) | 1.45
# Fluorine (F_2) | 1.31 | Sulfur dioxide (SO_2) | 2.21
# Helium (He) | 0.138 | Xenon (Xe) | 4.53
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# Data from CRC Handbook of Tables for Applied Engineering Science, 2nd ed, edited by R. Bolz and G. Tuve, CRC Press (1973).
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