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# PROPERTIES OF GASES
# reference tables
# Specific Heat at 1.0 Atm Pressure, 20ºC, Except as Noted
# Ratio of Specific Heat (γ)
# Gas | C_p
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# Acetylene | 1.674*10^3*J/(kg*K) | 1.25
# Air (mixture) | 1.005*10^3*J/(kg*K) | 1.4
# Ammonia (NH_3) | 2.175*10^3*J/(kg*K) | 1.31
# Argon (Ar) | 523*J/(kg*K) | 1.67
# Butadiene (C_4H_6) | 1.427*10^3*J/(kg*K) | 1.12
# n-Butane (C_4H_10) | 1.675*10^3*J/(kg*K) | 1.096
# 1-Butene (butylene) (C_4H_8) | 1.505*10^3*J/(kg*K) | 1.112
# Carbon dioxide (CO_2) | 876*J/(kg*K) | 1.3
# Carbon monoxide (CO) | 1.046*10^3*J/(kg*K) | 1.4
# Chlorine (Cl_2)
# 477*J/(kg*K) | 1.35
# Deuterium (D_2) | 7.238*10^3*J/(kg*K) | 1.4
# Ethane (C_2H_6) | 1.715*10^3*J/(kg*K) | 1.2
# Ethyl chloride (C_2H_5Cl) | 1.13*10^3*J/(kg*K) | 1.13
# Ethylene (ethene) (C_2H_4) | 1.548*10^3*J/(kg*K) | 1.24
# Fluorine (F_2) | 828*J/(kg*K) | 1.35
# Helium (He) | 5.188*10^3*J/(kg*K) | 1.66
# Hydrogen (H_2) | 1.431*10^4*J/(kg*K) | 1.41
# Hydrogen chloride (HCl) | 812*J/(kg*K) | 1.39
# Hydrogen sulfide (H_2S) | 962*J/(kg*K) | 1.33
# Krypton (Kr) | 247*J/(kg*K) | 1.68
# Methane (CH_4) | 2.26*10^3*J/(kg*K) | 1.31
# Methyl chloride (CH_3Cl) | 837*J/(kg*K) | 1.28
# Neon (Ne) | 1.03*10^3*J/(kg*K) | 1.64
# Nitric oxide (NO) | 983*J/(kg*K) | 1.4
# Nitrogen (N_2) | 1.04*10^3*J/(kg*K) | 1.4
# Nitrous oxide (N_2O) | 879*J/(kg*K) | 1.31
# Oxygen (O_2) | 920*J/(kg*K) | 1.4
# Ozone (O_3) | 820*J/(kg*K) | __
# Propane (C_3H_8) | 1.63*10^3*J/(kg*K) | 1.2
# Propylene (C_3H_6) | 1.506*10^3*J/(kg*K) | 1.16
# Sulfur dioxide (SO_2) | 460*J/(kg*K) | 1.29
# Xenon (Xe) | 481*J/(kg*K) | 1.67
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# Data from CRC Handbook of Tables for Applied Engineering Science, 2nd ed., edited by R. Bolz and G. Tuve, CRC Press (1973).
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