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# PROPERTIES OF GASES
# reference tables
# Sound Velocity at 1.0 Atm Pressure, 25ºC, Except as Noted
# Sound Velocity | Sound Velocity
# Gas | Gas
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# Acetylene | 343*m/sec | Hydrogen (H_2) | 1.315*10^3*m/sec
# Air (mixture) | 346*m/sec | Hydrogen chloride (HCl) | 310*m/sec
# Ammonia (NH_3) | 415*m/sec | Hydrogen sulfide (H_2S) | 302*m/sec
# Argon (Ar) | 322*m/sec | Krypton (Kr) | 223*m/sec
# Butadiene (C_4H_6) | 226*m/sec | Methane (CH_4) | 446*m/sec
# n-Butane, Isobutane  (C_4H_10) | 216*m/sec | Methyl chloride (CH_3Cl) | 251*m/sec
# 1-Butene (butylene) (C_4H_8) | 222*m/sec | Neon (Ne) | 454*m/sec
# Carbon dioxide (CO_2) | 270*m/sec | Nitric oxide (NO) | 341*m/sec
# Carbon monoxide (CO) | 352*m/sec | Nitrogen (N_2) | 353*m/sec
# Chlorine (Cl_2) | 215*m/sec | Nitrous oxide (N_2O) | 268*m/sec
# Deuterium (D_2) | 930*m/sec | Oxygen (O_2) | 329*m/sec
# Ethane (C_2H_6) | 316*m/sec | Propane (C_3H_8) | 253*m/sec
# Ethyl chloride (C_2H_5Cl) | Propylene (C_3H_6) | 261*m/sec
204*m/sec
# Sulfur dioxide (SO_2) | 220*m/sec
# Ethylene (ethene) (C_2H_4) | 331*m/sec
# Xenon (Xe) | 177*m/sec
# Fluorine (F_2) | 290*m/sec
# Helium (He) | 1.015*10^3*m/sec
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# Data from CRC Handbook of Tables for Applied Engineering Science, 2nd ed., edited by R. Bolz and G. Tuve, CRC Press (1973).
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