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# PROPERTIES OF GASES
# reference tables
# Molecular Weight at 1.0 Atm Pressure, 20ºC, Except as Noted
# Gas | Molecular Weight
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# Acetylene | 26.04
# Air (mixture) | 28.966
# Ammonia (NH_3) | 17.02
# Argon (Ar) | 39.948
# Butadiene (C_4H_6) | 54.09
# n-Butane, Isobutane (C_4H_10) | 58.12
# 1-Butene (butylene) (C_4H_8) | 56.108
# Carbon dioxide (CO_2) | 44.01
# Carbon monoxide (CO) | 28.011
# Chlorine (Cl_2) | 70.906
# Deuterium (D_2) | 2.014
# Ethane (C_2H_6) | 30.070
# Ethyl chloride (C_2H_5Cl) | 64.515
# Ethylene (ethene) (C_2H_4) | 28.054
# Fluorine (F_2) | 37.996
# Helium (He) | 4.0026
# Hydrogen (H_2) | 2.016
# Hydrogen chloride (HCl) | 36.461
# Hydrogen sulfide (H_2S) | 34.076
# Krypton (Kr) | 83.80
# Methane (CH_4) | 16.044
# Methyl chloride (CH_3Cl) | 50.488
# Neon (Ne) | 20.179
# Nitric oxide (NO) | 30.006
# Nitrogen (N_2) | 28.0134
# Nitrous oxide (N_2O) | 44.012
# Oxygen (O_2) | 31.9988
# Ozone (O_3) | 47.998
# Propane (C_3H_8) | 44.097
# Propylene (C_3H_6) | 42.08
# Sulfur dioxide (SO_2) | 64.06
# Xenon (Xe) | 131.30
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# Data from CRC Handbook of Tables for Applied Engineering Science, 2nd ed., edited by R. Bolz and G. Tuve, CRC Press (1973).
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