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# AREAS AND PERIMETERS
# reference tables
# Regular Polygon
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# Area:
1/4*n*b^2*cot(π/n)
# Perimeter: | n*b
# Example: Find the area and perimeter of a regular polygon given the length of each side, b, and the number of sides, n.
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b := 5/8*yd
n := 8
Area := 1/4*n*b^2*cot(π/n)
Area = 1.8861 yd^2
# Find the perimeter.
Perimeter := n*b
Perimeter = 5 yd
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