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# AREAS AND PERIMETERS
# reference tables
# Circumscribed Polygon
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# Area:
n*r^2*tan(π/n)
# Perimeter:
2*n*r*tan(π/n)
# Example: Find the area and perimeter of a regular polygon that circumscribes a circle given the radius of the circle, r, and the number of sides of the polygon, n.
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r := 4*km
n := 6
Area := n*r^2*tan(π/n)
Area = 55425626 m^2
# Find the perimeter.
Perimeter := 2*n*r*tan(π/n)
Perimeter = 27712.8 m
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