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# AREAS AND PERIMETERS
# reference tables
# Parabolic Segment
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# Area: | 2/3*a*b
# Arc Length, ABC:
1/2*sqrt(b^2 + 16*a^2) + b^2/(8*a)*ln((4*a + sqrt(b^2 + 16*a^2))/b)
# Example: Find the area and arc length, ABC, of a parabolic segment given the perpendicular lengths, a and b, as shown in the diagram.
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a := 2.8*m
b := 5.1*m
Area := 2/3*a*b
Area = 9.52 m^2
# Find the length of the arc ABC.
Arc := 1/2*sqrt(b^2 + 16*a^2) + b^2/(8*a)*ln((4*a + sqrt(b^2 + 16*a^2))/b)
Arc = 7.92755 m
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