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# AREAS AND PERIMETERS
# reference tables
# Ellipse
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# Area: | π*a*b
# Perimeter:
4*a*integral(sqrt(1 - ((a^2 - b^2)/a^2)*sin(θ)^2), θ = 0 .. π/2)
2*π*sqrt(1/2*(a^2 + b^2))  # Approximation of perimeter
# Example: Find the area and perimeter of an ellipse given the lengths of the semimajor and semiminor axes, a and b.
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a := 3*m
b := 1.75*m
Area := π*a*b
Area = 16.4934 m^2
# Find the perimeter.
Perimeter := 4*a*integral(sqrt(1 - ((a^2 - b^2)/a^2)*sin(θ)^2), θ = 0 .. π/2)
Perimeter = 15.1821 m
Perimeter_approx. := 2*π*sqrt(1/2*(a^2 + b^2))
Perimeter_approx. = 15.4306 m
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