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# AREAS AND PERIMETERS
# reference tables
# Cardioid
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# Area: | 3/2*π*a^2
# Arc length of the curve: | 8*a
# Equation of curve in polar coordinates:
r(θ, a) := 2*a*(1 + cos(θ))
# Example 1: Find the area bounded by the curve and the arc length of the curve given the radii of circles A and B, a.
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a := 2*ft
Area := 3/2*π*a^2
Area = 1.75118 m^2
# Find the arc length of the curve.
Arc_length := 8*a
Arc_length = 4.8768 m
# Example 2: A cardioid is a curve described by a point P of a circle, B, of radius, a, as it rolls on the outside of a fixed circle, A, with the same radius. The equation for the curve is given below.
a := 2*ft
n := 100
r(θ) := 2*a*(1 + cos(θ))  # equation in polar coordinates
# [polar plot: θ, r(θ)]
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