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# AREAS AND PERIMETERS
# reference tables
# Cycloid
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# Area of one arch:
3*π*a^2
# Arc length of one arch:
8*a
# Parametric equations:
x(a, φ) := a*(φ - sin(φ))
y(a, φ) := a*(1 - cos(φ))
# Example 1: Find the area and the arc length of one arch given the radius of the circle, a.
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a := 3.9*mm
Area := 3*π*a^2
Area = 143.351 mm^2
# Find the arc length of one arch.
Arc_length := 8*a
Arc_length = 31.2 mm
# Example 2: A cycloid is a curve described by a point P on a circle of radius a rolling along the x-axis.
a := 10*ft
n := 100
x(φ) := a*(φ - sin(φ))  # Equations in parametric form
y(φ) := a*(1 - cos(φ))
# [plot: y(φ) vs x(φ)]
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