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# AREAS AND PERIMETERS
# reference tables
# Hypocycloid
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# Area bounded by curve:
3/8*π*a^2
# Arc length:
6*a
# Parametric equations:
x(a, θ) := a*cos(θ)^3
y(a, θ) := a*sin(θ)^3
# Example 1: Find the area bounded by the curve and the arc length of the curve given the radius of the outer circle, a.
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a := 12*yd
Area := 3/8*π*a^2
Area = 169.646 yd^2
# Find the arc length of the curve.
Arc_length := 6*a
Arc_length = 72 yd
# Example 2: A hypocycloid is a curve described by a point P on a circle of radius a/4 as it rolls on the inside of a circle of radius a. The equation for the curve is given below.
a := 12*yd
n := 30
x(θ) := a*cos(θ)^3  # Equations in parametric form
y(θ) := a*sin(θ)^3
# [plot: y(θ) vs x(θ)]
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