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# AREAS AND PERIMETERS
# reference tables
# Lemniscate
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# Area for both loops: | a^2
# Equation in polar coordinates:
r^2 == a^2*cos(2*θ)
# Example 1: Find the area of a single loop of a lemniscate given a.
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a := 6*in
Area := a^2/2
Area = 18 in^2
# Example 2: The equation for the lemniscate is given below.
a := 6
n := 100
r^2 == a^2*cos(2*θ)  # equation in polar coordinates
r(θ) := a*sqrt(cos(2*θ))  # assume a is positive
# [polar plot: θ, r(θ)]
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