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# AREAS AND PERIMETERS
# reference tables
# Rectangle
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# Area: | a*b
# Perimeter:
2*a + 2*b
# Example:  Find the area and perimeter of a rectangle given its length, b, and width, a.
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a := 3.4*in
b := 12.8*in
Area := a*b
Area = 43.52 in^2
Perimeter := 2*a + 2*b
Perimeter = 32.4 in
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