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# AREAS AND PERIMETERS
# reference tables
# Trapezoid
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# Area:
1/2*h*(a + b)
# Perimeter:
a + b + h*(1/sin(θ) + 1/sin(φ))
# Example 1: Find the area of a trapezoid given the lengths of the parallel sides, a and b, and the altitude, h.
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a := 12*mm
b := 18*mm
h := 5*mm
Area := 1/2*h*(a + b)
Area = 75 mm^2
# Example 2: Find the perimeter of a trapezoid given the lengths of the parallel sides, a and b, the altitude, h, and a base angle, θ.
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a := 12*mm
b := 18*mm
h := 5*mm
θ := 50*deg
# First find the other base angle, φ.
b_1 := h/tan(θ)
b_1 = 4.1955 mm
b_2 := b - a - b_1
b_2 = 1.8045 mm
φ := atan(h/b_2)
φ = 1.22444
# Then find the perimeter.
Perimeter := a + b + h*(1/sin(θ) + 1/sin(φ))
Perimeter = 41.8427 mm
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