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# AREAS AND PERIMETERS
# reference tables
# Circle
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# Area: | π*r^2
# Perimeter: | 2*π*r
# Example: Find the area and perimeter of a circle given the radius of the circle.
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r := 100*mi
Area := π*r^2
Area = 31415.9 mi^2
# Find the perimeter.
Perimeter := 2*π*r
Perimeter = 628.319 mi
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