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# AREAS AND PERIMETERS
# reference tables
# Inscribed Circle
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# Radius of inscribed circle:
sqrt(s*(s - a)*(s - b)*(s - c))/s
# where s is the semiperimeter of the triangle.
# Example: Find the radius and area of a circle inscribed in a triangle given the lengths of the sides of the triangle, a, b, and c.
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a := 2*m
b := 2.75*m
c := 2.6*m
# First, find the radius of the circle.
s := 1/2*(a + b + c)  # Semiperimeter
r := sqrt(s*(s - a)*(s - b)*(s - c))/s
r = 0.673215 m
Area := π*r^2
Area = 1.42383 m^2
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