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# AREAS AND PERIMETERS
# reference tables
# Circular Segment
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# Area:
1/2*r^2*(θ - sin(θ))
# Example: Find the area of a circular segment given the radius of the circle, r, and the central angle, θ.
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r := 10*cm
θ := 110*deg
Area := 1/2*r^2*(θ - sin(θ))
Area = 49.0085 cm^2
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