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# VOLUMES AND SURFACE AREAS
# reference tables
# Spherical Cap
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# Volume:
1/3*π*h^2*(3*r - h)
# Surface area:
2*π*r*h
# Example: Find the volume and surface area of a spherical cap given the radius, r, and height, h.
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r := .938*ft
h := 4.375*in
Volume := 1/3*π*h^2*(3*r - h)
Volume = 589.154 in^3
# Find the surface area.
SA := 2*π*r*h
SA = 309.415 in^2
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