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# VOLUMES AND SURFACE AREAS
# reference tables
# Paraboloid
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# Volume:
1/2*π*b^2*a
# Example: Find the volume of a paraboloid given the perpendicular lengths, a and b.
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a := 10*ft
b := 4.333*ft
Volume := 1/2*π*b^2*a
Volume = 294.915 ft^3
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