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# VOLUMES AND SURFACE AREAS
# reference tables
# Rectangular Prism
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# Volume:
a*b*c
# Surface Area:
2*(a*b + a*c + b*c)
# Example: Find the volume of a rectangular prism (or right parallelepiped) given the length, a, height, b, and width, c.
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a := 23.5*m
b := 4.6*m
c := 7.6*m
Volume := a*b*c
Volume = 821.56 m^3
# Find the surface area.
SA := 2*(a*b + a*c + b*c)
SA = 643.32 m^2
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