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# VOLUMES AND SURFACE AREAS
# reference tables
# Parallelepiped
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# Expressions for volume:
# A*h | Volume in terms of A and h
a*b*c*sin(θ)  # Volume in terms of a, b, c and θ
# Example 1: Find the volume of a parallelepiped given the cross-sectional area of the base, A and the height, h.
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A := 56*in^2
h := 2.82*in
Volume := A*h
Volume = 157.92 in^3
# Example 2: Find the volume of a parallelepiped given the lengths of the edges and the slant angle, θ.
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a := 14*in
b := 3*in
c := 4*in
θ := 70*deg
Volume := a*b*c*sin(θ)
Volume = 157.868 in^3
# Alternatively, first compute the height, h, and then the cross-sectional area, A.
h := b*sin(θ)
h = 0.0716046 m
A := a*c
A = 0.036129 m^2
Volume := A*h
Volume = 157.868 in^3
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