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# VOLUMES AND SURFACE AREAS
# reference tables
# Right Circular Cylinder
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# Volume:
π*r^2*h
# Lateral surface area:
2*π*r*h
# Example: Find the volume and lateral surface area of a right circular cylinder given the radius of the base, r, and the height, h.
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r := 25.6*ft
h := 70.5*ft
Volume := π*r^2*h
Volume = 145151 ft^3
# Find the lateral surface area.
Lateral_SA := 2*π*r*h
Lateral_SA = 11339.9 ft^2
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