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# VOLUMES AND SURFACE AREAS
# reference tables
# Pyramid
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# Volume:
1/3*A*h
# Example: Find the volume of a pyramid with base area, A, and height, h.
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A := 38.7*mm^2
h := 9.2*mm
Volume := 1/3*A*h
Volume = 118.68 mm^3
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