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# VOLUMES AND SURFACE AREAS
# reference tables
# Right Circular Cone
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# Volume:
1/3*π*r^2*h
# Expressions for lateral surface area:
π*r*sqrt(r^2 + h^2)  # Lateral surface area in terms of r and h
# π*r*l | Lateral surface area in terms of r and l
# Example 1: Find the volume and lateral surface area of a right circular cone given the radius, r and height, h.
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r := 4.97*cm
h := 12.5*cm
Volume := 1/3*π*r^2*h
Volume = 323.334 cm^3
# Find the lateral surface area.
Lateral_SA := π*r*sqrt(r^2 + h^2)
Lateral_SA = 0.0210033 m^2
# Example 2: Find the lateral surface area of a right circular cone given the radius, r, and the lateral height, l.
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r := 6*m
l := 8.5*m
Lateral_SA := π*r*l
Lateral_SA = 160.221 m^2
# Note that this is an alternative form of the surface area equation given in Example 1 where:
l := sqrt(r^2 + h^2)
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