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# VOLUMES AND SURFACE AREAS
# reference tables
# Sphere
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# Volume:
4/3*π*r^3
# Surface area:
4*π*r^2
# Example: Find the volume and surface area of a sphere given the radius.
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r := 6.45*mm
Volume := 4/3*π*r^3
Volume = 1124 mm^3
# Find the surface area.
SA := 4*π*r^2
SA = 522.792 mm^2
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