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# PROPERTIES OF LIQUIDS
# reference tables
# Density at 1.0 Atm Pressure, 300 K
# Liquid | Density | Liquid | Density
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# Acetic acid | 1049*kg/m^3 | Fl refrigerant R-12 | 1311*kg/m^3
# Acetone | 784.6*kg/m^3 | Fl refrigerant R-22 | 1194*kg/m^3
# Alcohol, ethyl | 785.1*kg/m^3 | Glycerine | 1259*kg/m^3
# Alcohol, methyl | 786.5*kg/m^3 | Heptane | 679.5*kg/m^3
# Alcohol, propyl | 800.0*kg/m^3 | Hexane | 654.8*kg/m^3
# Ammonia (aqua) | 823.5*kg/m^3 | Kerosene | 820.1*kg/m^3
# Benzene | 873.8*kg/m^3 | Linseed oil | 929.1*kg/m^3
# Carbon disulfide | 1261*kg/m^3 | Octane | 698.6*kg/m^3
# Carbon tetrachloride | 1584*kg/m^3 | Phenol | 1072*kg/m^3
# Castor oil | 956.1*kg/m^3 | Propane | 493.5*kg/m^3
# Chloroform | 1465*kg/m^3 | Propylene | 514.4*kg/m^3
# Decane | 726.3*kg/m^3 | Propylene glycol | 965.3*kg/m^3
# Dodecane | 754.6*kg/m^3 | Sea water | 1025*kg/m^3
# Ether | 713.5*kg/m^3 | Toluene | 862.3*kg/m^3
# Ethylene glycol | 1097*kg/m^3 | Turpentine | 868.2*kg/m^3
# Fl refrigerant R-11 | 1476*kg/m^3 | Water | 997.1*kg/m^3
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# Data from CRC Handbook of Tables for Applied Engineering Science, 2nd edition, edited by R. Bolz and G. Tuve, CRC Press (1973).
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