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# PROPERTIES OF LIQUIDS
# reference tables
# Viscosity at 1.0 Atm Pressure, 300 K
# Liquid | Viscosity
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# Acetic acid
0.001155*newton*sec/m^2
# Acetone
0.000316*newton*sec/m^2
# Alcohol, ethyl
0.001095*newton*sec/m^2
# Alcohol, methyl
0.00056*newton*sec/m^2
# Alcohol, propyl
0.00192*newton*sec/m^2
# Benzene
0.000601*newton*sec/m^2
# Bromine
0.00095*newton*sec/m^2
# Carbon disulfide
0.00036*newton*sec/m^2
# Carbon tetrachloride
0.00091*newton*sec/m^2
# Castor oil
0.650*newton*sec/m^2
# Chloroform
0.00053*newton*sec/m^2
# Decane
0.000859*newton*sec/m^2
# Dodecane
0.001374*newton*sec/m^2
# Ether
0.000223*newton*sec/m^2
# Ethylene glycol
0.0162*newton*sec/m^2
# Fl refrigerant R-11
0.00042*newton*sec/m^2
# Glycerine
0.950*newton*sec/m^2
# Heptane
0.000376*newton*sec/m^2
# Hexane
0.000297*newton*sec/m^2
# Kerosene
0.00164*newton*sec/m^2
# Linseed oil
0.0331*newton*sec/m^2
# Mercury
0.00153*newton*sec/m^2
# Octane
0.00051*newton*sec/m^2
# Phenol
0.0080*newton*sec/m^2
# Propane
0.00011*newton*sec/m^2
# Propylene
0.00009*newton*sec/m^2
# Propylene glycol
0.042*newton*sec/m^2
# Toluene
0.000550*newton*sec/m^2
# Turpentine
0.001375*newton*sec/m^2
# Water
0.00089*newton*sec/m^2
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# Data from CRC Handbook of Tables for Applied Engineering Science, 2nd edition, edited by R. Bolz and G. Tuve, CRC Press (1973).
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