# Worksheet setting: ORIGIN = 1
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# PROPERTIES OF LIQUIDS
# reference tables
# Specific Gravity at 1.0 Atm Pressure, 25ºC
# Specific
# Gravity
# Specific
# Gravity
# Liquid | Liquid
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# Acetic acid | 1.049 | Fl refrigerant R-22 | 1.197
# Acetone | 0.787 | Glycerine | 1.263
# Alcohol, ethyl | 0.787 | Heptane | 0.681
# Alcohol, methyl | 0.789 | Hexane | 0.657
# Alcohol, propyl | 0.802 | Kerosene | 0.823
# Ammonia (aqua) | 0.826 | Linseed oil | 0.93
# Benzene | 0.876 | Mercury | 13.633
# Carbon disulfide | 1.265 | Octane | 0.701
# Carbon tetrachloride | 1.59 | Phenol | 1.07
# Castor oil | 0.960 | Propane | 0.495
# Chloroform | 1.47 | Propylene | 0.516
# Decane | 0.728 | Propylene glycol | 0.968
# Ether | 0.715 | Sea water | 1.03
# Ethylene glycol | 1.100 | Toluene | 0.865
# Fl refrigerant R-11 | 1.480 | Turpentine | 0.87
# Fl refrigerant R-12 | 1.315 | Water | 1.00
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# Data from CRC Handbook of Tables for Applied Engineering Science, 2nd edition, edited by R. Bolz and G. Tuve, CRC Press (1973).
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