# Worksheet setting: ORIGIN = 1
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# PROPERTIES OF LIQUIDS
# reference tables
# Sound Velocity at 1.0 Atm Pressure, 25ºC, Except as Noted
# Sound Velocity (m/sec) | Sound Velocity (m/sec)
# Liquid | Liquid
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# Acetic acid (50°C) | 1.584*10^3 | Glycerine | 1.909*10^3
# Acetone
# 1.174*10^3 | Heptane | 1.138*10^3
# Alcohol, ethyl
# 1.144*10^3 | Hexane | 1.203*10^3
# Alcohol, methyl
# 1.103*10^3 | Kerosene | 1.32*10^3
# Alcohol, propyl
# 1.205*10^3 | Mercury | 1.45*10^3
# Benzene
# 1.298*10^3 | Octane | 1.171*10^3
# Carbon disulfide
# 1.149*10^3 | Phenol (100°C) | 1.274*10^3
# Carbon tetrachloride
# 924 | Sea water
1.535*10^3
# Castor oil
# 1.474*10^3 | Toluene (30°C)
1.275*10^3
# Chloroform
# 995 | Turpentine
1.24*10^3
# Ether | 985 | Water
1.498*10^3
# Ethylene glycol | 1.644*10^3
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# From CRC Handbook of Tables for Applied Engineering Science, 2nd edition, edited by R. Bolz and G. Tuve, CRC Press (1973).
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