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# PROPERTIES OF LIQUIDS
# reference tables
# Surface Tension at 1.0 Atm Pressure, 25ºC
# Liquid | Surface Tension
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# Acetic acid | 0.0273*newton/m
# Acetone | 0.0231*newton/m
# Alcohol, ethyl | 0.02233*newton/m
# Alcohol, methyl | 0.0222*newton/m
# Alcohol, propyl | 0.0235*newton/m
# Benzene | 0.02818*newton/m
# Bromine | 0.0415*newton/m
# Carbon disulfide | 0.03233*newton/m
# Carbon tetrachloride | 0.0263*newton/m
# Chloroform | 0.02714*newton/m
# Decane | 0.02343*newton/m
# Ether | 0.01642*newton/m
# Ethylene glycol | 0.0482*newton/m
# Fl refrigerant R-11 | 0.0183*newton/m
# Fl refrigerant R-12 | 0.00887*newton/m
# Fl refrigerant R-22 | 0.00835*newton/m
# Glycerine | 0.0630*newton/m
# Heptane | 0.0199*newton/m
# Hexane | 0.0180*newton/m
# Mercury | 0.484*newton/m
# Octane | 0.02114*newton/m
# Phenol | 0.0404*newton/m
# Propane | 0.0066*newton/m
# Propylene | 0.0070*newton/m
# Propylene glycol | 0.0363*newton/m
# Toluene | 0.0273*newton/m
# Water | 0.07197*newton/m
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# Data from CRC Handbook of Tables for Applied Engineering Science, 2nd edition, edited by R. Bolz and G. Tuve, CRC Press (1973).
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