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# PROPERTIES OF LIQUIDS
# reference tables
# Dielectric Constant at 1.0 Atm Pressure, 25ºC
# Dielectric Constant | Dielectric Constant
# Liquid | Liquid
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# Acetic acid | 6.15 | Decane | 2.0
# Acetone | 20.7 | Ether | 4.3
# Alcohol, ethyl | 24.3 | Ethylene glycol | 37.7
# Alcohol, methyl | 32.6 | Fl refrigerant R-12 | 2.0
# Alcohol, propyl | 20.1 | Glycerine | 40
# Ammonia (aqua) | 16.9 | Heptane | 1.92
# Benzene | 2.2 | Iodine | 11
# Bromine | 3.20 | Phenol | 9.8
# Carbon disulfide | 2.64 | Propane | 1.27
# Carbon tetrachloride | 2.23 | Toluene | 2.4
# Castor oil | 4.7 | Water^a | 78.54
# Chloroform | 4.8
# The dielectric constant of water near the freezing point is 87.8; it decreases with increase in temperature to about 55.6 near the boiling point.
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# Data from CRC Handbook of Tables for Applied Engineering Science, 2nd edition, edited by R. Bolz and G. Tuve, CRC Press (1973).
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