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# PROPERTIES OF LIQUIDS
# reference tables
# Index of Refraction at 1.0 Atm Pressure, 25ºC
# Index of
# Refraction
# Index of
# Refraction
# Liquid | Liquid
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# Acetic acid | 1.37 | Fl refrigerant R-11 | 1.37
# Acetone | 1.36 | Fl refrigerant R-12 | 1.29
# Alcohol, ethyl | 1.36 | Fl refrigerant R-22 | 1.26
# Alcohol, methyl | 1.33 | Glycerine | 1.47
# Alcohol, propyl | 1.38 | Heptane | 1.38
# Benzene | 1.50 | Hexane | 1.37
# Carbon disulfide | 1.63 | Octane | 1.40
# Carbon tetrachloride | 1.46 | Propane | 1.34
# Chloroform | 1.44 | Propylene | 1.36
# Decane | 1.41 | Propylene glycol | 1.43
# Dodecane | 1.41 | Toluene | 1.49
# Ether | 1.35 | Turpentine | 1.47
# Ethylene glycol | 1.43 | Water | 1.33
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# Data from CRC Handbook of Tables for Applied Engineering Science, 2nd edition, edited by R. Bolz and G. Tuve, CRC Press (1973).
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