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# PROPERTIES OF LIQUIDS
# reference tables
# Molecular Weight at 1.0 Atm Pressure, 25ºC
# Liquid | Molecular Weight | Liquid | Molecular Weight
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# Acetic acid | 60.0537 | Fl refrigerant R-12 | 120.914
# Acetone | 58.081 | Fl refrigerant R-22 | 86.469
# Alcohol, ethyl | 46.070 | Glycerine | 92.096
# Alcohol, methyl | 32.043 | Heptane | 100.208
# Alcohol, propyl | 60.098 | Hexane | 86.181
# Ammonia (aqua) | 17.698 | Iodine | 253.809
# Benzene | 78.117 | Mercury | 200.59
# Bromine | 159.818 | Octane | 114.235
# Carbon disulfide | 76.140 | Phenol | 94.116
# Carbon tetrachloride | 153.824 | Propane | 44.098
# Chloroform | 119.378 | Propylene | 42.082
# Decane | 142.290 | Propylene glycol | 76.097
# Dodecane | 170.345 | Sea water | 18.52
# Ether | 74.125 | Toluene | 92.144
# Ethylene glycol | 62.070 | Turpentine | 136.242
# Fl refrigerant R-11 | 137.369 | Water | 18.0153
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# Data from CRC Handbook of Tables for Applied Engineering Science, 2nd edition, edited by R. Bolz and G. Tuve, CRC Press (1973).
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