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# CENTROIDS
# reference tables
# Arc of a Circle
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# Distance, x, of centroid from center:
r*sin(1/2*θ)/(1/2*θ)
# Example: Locate the centroid, c, of a circular sector given the radius of the circle, r, and the central angle, θ.
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r := 8.9*m
θ := 38*deg
x := r*sin(1/2*θ)/(1/2*θ)  # Distance from the center
x = 8.73778 m
# The centroid is located on the angle bisector of the central angle a distance x from the center of the circle.
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