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# CENTROIDS
# reference tables
# Triangular Area
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# Height, y, of centroid from base:
h/3
# Example: Locate the centroid, c, of a triangular area given the height, h, of the triangle.
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h := 5*mm
y := h/3  # Height of centroid from base
y = 0.00166667 m
# The centroid is located on the median of the triangle at a
# height y from the base of the triangle.
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