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# CENTROIDS
# reference tables
# Semiparabolic Area
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# Horizontal component, x, of centroid:
3*a/8
# Vertical component, y, of centroid:
3*h/5
# Example: Locate the centroid, c, of a semiparabolic area given the perpendicular lengths, a and h, as shown in the diagram.
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a := 140*mm
h := 158*mm
x := 3*a/8  # Horizontal component of the centroid
y := 3*h/5  # Vertical component of the centroid
x = 0.0525 m
y = 0.0948 m
# The coordinates of the centroid relative to the vertex of the parabola are (x, y).
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