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# CENTROIDS
# reference tables
# Parabolic Area
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# Distance, y, of centroid from vertex:
3*h/5
# Example: Locate the centroid, c, of a parabolic area given the perpendicular lengths, a and h, as shown in the diagram.
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a := 35.5*in
h := 41.5*in
y := 3*h/5  # Distance of centroid from center
y = 0.63246 m
# The centroid is located on the axis of symmetry of the parabola a distance y from the vertex.
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