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# CENTROIDS
# reference tables
# Parabolic Spandrel
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# Horizontal component of centroid:
3*a/4
# Vertical component of centroid:
3*h/10
# Example: Locate the centroid of a parabolic spandrel given the perpendicular lengths, a and h, as shown in the diagram.
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a := 17*in
h := 15*in
x := 3*a/4  # Horizontal component of centroid
y := 3*h/10  # Vertical component of centroid
x = 0.32385 m
y = 0.1143 m
# The coordinates of the centroid relative to the vertex of the spandrel are (x, y).
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