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# CENTROIDS
# reference tables
# Quarter Circular Arc
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# Horizontal component, x, of the centroid:
2*r/π
# Vertical component, y, of the centroid:
2*r/π
# Example: Locate the centroid, c, of the quarter circular arc given the radius, r, of the circle.
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r := 15.*in
x := 2*r/π  # Horizontal component of the centroid
y := 2*r/π  # Vertical component of the centroid
x = 0.242552 m
y = 0.242552 m
# The coordinates of the centroid relative to the center of the circle are (x, y).
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