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# CENTROIDS
# reference tables
# Semicircular Arc
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# Distance, y, of centroid from the center:
2*r/π
# Example: Locate the centroid, c, of a semicircular arc given the radius of the circle, r.
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r := 16*yd
y := 2*r/π  # Distance of centroid from center
y = 9.314 m
# The centroid is located on the perpendicular bisector of the diameter of the circle at a height y from the diameter.
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