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# MASS MOMENTS OF INERTIA
# reference tables
# Slender Rod
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# Mass moment of inertia:
# 1/12*mass*L^2 | About the y- or z-axis
# Example: Determine the mass moment of inertia, I, of a slender rod about an axis perpendicular to the rod and passing through the centroidal, G, given the length of the rod, L, and its mass.
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L := 10*ft
mass := 29.9*slug
I := 1/12*mass*L^2  # Moment of inertia about y or z
I = 337.825 kg*m^2
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