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# MASS MOMENTS OF INERTIA
# reference tables
# Thin Rectangular Plate
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# Mass moment of inertia:
1/12*mass*(b^2 + c^2)  # About the x-axis
# 1/12*mass*c^2 | About the y-axis
# 1/12*mass*b^2 | About the z-axis
# Example: Determine the mass moment of inertia, I, of a thin rectangular plate about the x-, y-, and z-axes as shown passing through the centroidal, G, given the dimensions of the rectangle, b and c, and the mass of the plate.
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b := 3*ft
c := 6.5*ft
mass := 74*slug
I_x := 1/12*mass*(b^2 + c^2)  # Moment about x
I_y := 1/12*mass*c^2  # Moment about y
I_z := 1/12*mass*b^2  # Moment about z
I_x = 428.495 kg*m^2
I_y = 353.247 kg*m^2
I_z = 75.2479 kg*m^2
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