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# MASS MOMENTS OF INERTIA
# reference tables
# Rectangular Prism
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# Mass moment of inertia:
1/12*mass*(b^2 + c^2)  # About the x-axis
1/12*mass*(c^2 + a^2)  # About the y-axis
1/12*mass*(a^2 + b^2)  # About the z-axis
# Example: Determine the mass moment of inertia, I, of a rectangular prism about the x-, y-, and z-axes as shown, given the dimensions of the rectangle, a, b, and c, and its mass.
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a := 5*in
b := 2*in
c := 3*in
mass := 5.19*10^5*lb
I_x := 1/12*mass*(b^2 + c^2)  # Moment about the x-axis
I_y := 1/12*mass*(c^2 + a^2)  # Moment about the y-axis
I_z := 1/12*mass*(a^2 + b^2)  # Moment about the z-axis
I_x = 164.537 kg*m^2
I_y = 430.327 kg*m^2
I_z = 367.043 kg*m^2
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