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# PROPERTIES OF METALS
# reference tables
# Thermal Conductivity at Atmospheric Pressure, 25º C
# Metal | Thermal Conductivity (watt/cm K) | Metal | Thermal Conductivity (watt/cm K)
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# Aluminum | 2.37*watt/(cm*K) | Osmium | 0.61*watt/(cm*K)
# Antimony | 0.185*watt/(cm*K) | Platinum | 0.73*watt/(cm*K)
# Beryllium | 2.18*watt/(cm*K) | Plutonium | 0.08*watt/(cm*K)
# Bismuth | 0.084*watt/(cm*K) | Potassium | 0.99*watt/(cm*K)
# Cadmium | 0.92*watt/(cm*K) | Rhodium | 1.5*watt/(cm*K)
# Chromium | 0.91*watt/(cm*K) | Selenium | 5*10^-3*watt/(cm*K)
# Cobalt | 0.69*watt/(cm*K) | Silicon | 0.835*watt/(cm*K)
# Copper | 3.98*watt/(cm*K) | Silver | 4.27*watt/(cm*K)
# Gold | 3.15*watt/(cm*K) | Sodium | 1.34*watt/(cm*K)
# Iridium | 1.47*watt/(cm*K) | Tantalum | 0.575*watt/(cm*K)
# Iron | 0.803*watt/(cm*K) | Thorium | 0.41*watt/(cm*K)
# Lead | 0.352*watt/(cm*K) | Tin | 0.67*watt/(cm*K)
# Magnesium | 1.56*watt/(cm*K) | Titanium | 0.22*watt/(cm*K)
# Mercury | 0.084*watt/(cm*K) | Tungsten | 1.78*watt/(cm*K)
# Molybdenum | 1.38*watt/(cm*K) | Uranium | 0.25*watt/(cm*K)
# Nickel | 0.905*watt/(cm*K) | Vanadium | 0.6*watt/(cm*K)
# Niobium | 0.53*watt/(cm*K) | Zinc | 1.21*watt/(cm*K)
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# Data from CRC Handbook of Tables for Applied Engineering Science, 2nd edition, edited by R. Bolz and G. Tuve, CRC Press (1973).
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