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# PROPERTIES OF METALS
# reference tables
# Specific Gravity
# Specific Gravity | Specific Gravity
# Metal | Metal
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# Aluminum | 2.70 | Osmium | 22.57
# Antimony | 6.69 | Platinum | 21.45
# Beryllium | 1.85 | Plutonium | 19.84
# Bismuth | 9.75 | Potassium | 0.86
# Cadmium | 8.65 | Rhodium | 12.41
# Chromium | 7.2 | Selenium | 4.8
# Cobalt | 8.90 | Silicon | 2.33
# Copper | 8.96 | Silver | 10.50
# Gold | 19.32 | Sodium | 0.97
# Iridium | 22.42 | Tantalum | 16.6
# Iron | 7.87 | Thorium | 11.7
# Lead | 11.35 | Tin | 7.31
# Magnesium | 1.74 | Titanium | 4.54
# Manganese | 7.34 | Tungsten | 19.3
# Mercury | 13.546 | Uranium | 18.8
# Molybdenum | 10.22 | Vanadium | 6.1
# Nickel | 8.9 | Zinc | 7
# Niobium | 8.57
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# Data from CRC Handbook of Tables for Applied Engineering Science, 2nd edition, edited by R. Bolz and G. Tuve, CRC Press (1973).
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