# Worksheet setting: ORIGIN = 1
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# PROPERTIES OF METALS
# reference tables
# Coefficient of Linear Expansion per Degree Celsius at 25° C
# Expansion Coefficient
# (x10^6)
# Expansion Coefficient
# (x10^6)
# Metal | Metal
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# Aluminum | 25 | Osmium | 5
# Antimony | 9 | Platinum | 9
# Beryllium | 12 | Plutonium | 54
# Bismuth | 13 | Potassium | 83
# Cadmium | 30 | Rhodium | 8
# Chromium | 6 | Selenium | 37
# Cobalt | 12 | Silicon | 3
# Copper | 16.6 | Silver | 19
# Gold | 14.2 | Sodium | 70
# Iridium | 6 | Tantalum | 6.5
# Iron | 12 | Thorium | 12
# Lead | 29 | Tin | 20
# Magnesium | 25 | Titanium | 8.5
# Manganese | 22 | Tungsten | 4.5
# Molybdenum | 5 | Uranium | 13.4
# Nickel | 13 | Vanadium | 8
# Niobium | 7 | Zinc | 35
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# Data from CRC Handbook of Tables for Applied Engineering Science, 2nd edition, edited by R. Bolz and G. Tuve, CRC Press (1973).
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