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# PROPERTIES OF METALS
# reference tables
# Electrical Resistivity
# Electrical Resistivity
# at 20° C, (Ohm ·m·10^-8)
# Electrical Resistivity at 20° C, (Ohm ·m·10^-8)
# Metal | Metal
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# Aluminum | 2.67 | Nickel | 6.9
# Antimony | 40.1 | Niobium | 16
# Beryllium | 3.3 | Osmium | 8.8
# Bismuth | 117 | Platinum | 10.58
# Cadmium | 7.3 | Potassium | 6.8
# Chromium | 13.2 | Rhodium | 4.7
# Cobalt | 6.34 | Silver | 1.63
# Copper | 1.694 | Sodium | 4.7
# Gold | 2.2 | Tantalum | 13.5
# Iridium | 5.1 | Thorium | 14
# Iron | 10.1 | Tin | 12.6
# Lead | 20.6 | Titanium | 54
# Magnesium | 4.2 | Tungsten | 5.4
# Manganese | 160 | Uranium | 27
# Mercury | 95.9 | Vanadium | 19.6
# Molybdenum | 5.7 | Zinc | 5.96
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# Data from CRC Handbook of Tables for Applied Engineering Science, 2nd edition, edited by R. Bolz and G. Tuve, CRC Press (1973), and Electronics Engineers' Handbook, 3rd edition, edited by D. Fink and D. Christiansen, McGraw-Hill, 1989.
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