# Worksheet setting: ORIGIN = 1
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# PROPERTIES OF METALS
# reference tables
# Poisson’s Ratio
# Metal | Poisson’s Ratio | Metal | Poisson’s Ratio
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# Aluminum | 0.33 | Plutonium | 0.18 | (aver.)
# Beryllium | 0.027 | (aver.) | Silver | 0.37
# Copper | 0.36 | Tantalum | 0.35
# Gold | 0.42 | Thorium | 0.27
# Lead | 0.43 | (aver.) | Tin | 0.33
# Magnesium | 0.35 | Titanium | 0.3
# Molybdenum | 0.32 | Tungsten | 0.28
# Nickel | 0.31 | Uranium | 0.21
# Platinum | 0.39 | Zinc | 0.25
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# Data from CRC Handbook of Tables for Applied Engineering Science, 2nd edition, edited by R. Bolz and G. Tuve, CRC Press (1973).
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