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# PROPERTIES OF METALS
# reference tables
# Modulus of Elasticity
# Modulus of Elasticity (Pa) | Modulus of Elasticity (Pa)
# Metal | Metal
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# Aluminum | 6.895*10^10*Pa | Niobium | 1.034*10^11*Pa
# Antimony | 7.791*10^10*Pa | Osmium | 5.516*10^11*Pa
# Beryllium | 2.896*10^11*Pa | Platinum | 1.469*10^11*Pa
# Bismuth | 3.172*10^10*Pa | Plutonium | 9.653*10^10*Pa
# Cadmium | 5.516*10^10*Pa | Rhodium | 2.896*10^11*Pa
# Chromium | 2.482*10^11*Pa | Selenium | 5.792*10^10*Pa
# Cobalt | 2.068*10^11*Pa | Silicon | 1.103*10^11*Pa
# Copper | 1.172*10^11*Pa | Silver | 7.239*10^10*Pa
# Gold | 7.446*10^10*Pa | Tantalum | 1.862*10^11*Pa
# Iridium | 5.171*10^11*Pa | Thorium | 5.861*10^10*Pa
# Iron | 1.965*10^11*Pa | Tin | 4.137*10^10*Pa
# Lead | 1.379*10^10*Pa | Titanium | 1.103*10^11*Pa
# Magnesium | 4.413*10^10*Pa | Tungsten | 3.447*10^11*Pa
# Manganese | 1.586*10^11*Pa | Uranium | 1.655*10^11*Pa
# Molybdenum | 2.758*10^11*Pa | Vanadium | 1.31*10^11*Pa
# Nickel | 2.137*10^11*Pa | Zinc | 8.274*10^10*Pa
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# Data from CRC Handbook of Tables for Applied Engineering Science, 2nd edition, edited by R. Bolz and G. Tuve, CRC Press (1973).
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