# Worksheet setting: ORIGIN = 1
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# PROPERTIES OF METALS
# reference tables
# Melting Point in Degrees Kelvin at Atmospheric Pressure
# Metal | Melting Point (K) | Metal | Melting Point (K)
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# Aluminum | 933*K | Osmium | 3298*K
# Antimony | 903*K | Platinum | 2043*K
# Beryllium | 1558*K | Plutonium | 913*K
# Bismuth | 544*K | Potassium | 336.5*K
# Cadmium | 594*K | Rhodium | 2238*K
# Chromium | 2133*K | Selenium | 490*K
# Cobalt | 1768*K | Silicon | 1684*K
# Copper | 1357*K | Silver | 1234*K
# Gold | 1336*K | Sodium | 370.98*K
# Iridium | 2723*K | Tantalum | 3253*K
# Iron | 1809*K | Thorium | 2023*K
# Lead | 600.7*K | Tin | 505*K
# Magnesium | 923*K | Titanium | 1943*K
# Manganese | 1517*K | Tungsten | 3673*K
# Mercury | 234.29*K | Uranium | 1405*K
# Molybdenum | 2893*K | Vanadium | 2173*K
# Nickel | 1726*K | Zinc | 692.7*K
# Niobium | 2740*K
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# Data from CRC Handbook of Tables for Applied Engineering Science, 2nd edition, edited by R. Bolz and G. Tuve, CRC Press (1973).
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