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# PROPERTIES OF METALS
# reference tables
# Temperature Coefficient of Resistivity per Degree Celsius
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# Metal | Coefficient | Metal | Coefficient
# Aluminum | 4*10^-3*Ω/Δ°C | Molybdenum | 4*10^-3*Ω/Δ°C
# Antimony | 3.6*10^-3*Ω/Δ°C | Nickel | 6*10^-3*Ω/Δ°C
# Beryllium | 0.025*Ω/Δ°C | Niobium | 4*10^-3*Ω/Δ°C
# Bismuth | 4*10^-3*Ω/Δ°C | Osmium | 4*10^-3*Ω/Δ°C
# Cadmium | 4*10^-3*Ω/Δ°C | Palladium | 3.5*10^-3*Ω/Δ°C
# Cerium | 9*10^-4*Ω/Δ°C | Platinum | 3.9*10^-3*Ω/Δ°C
# Chromium | 3*10^-3*Ω/Δ°C | Rhenium | 4*10^-3*Ω/Δ°C
# Cobalt | 6*10^-3*Ω/Δ°C | Rhodium | 4.5*10^-3*Ω/Δ°C
# Copper | 4*10^-3*Ω/Δ°C | Silver | 3.8*10^-3*Ω/Δ°C
# Gold | 3.5*10^-3*Ω/Δ°C | Tantalum | 3.5*10^-3*Ω/Δ°C
# Hafnium | 4*10^-3*Ω/Δ°C | Thorium | 3*10^-3*Ω/Δ°C
# Indium | 5*10^-3*Ω/Δ°C | Tin | 4.5*10^-4*Ω/Δ°C
# Iridium | 3.9*10^-3*Ω/Δ°C | Titanium | 3.5*10^-3*Ω/Δ°C
# Iron | 6*10^-3*Ω/Δ°C | Tungsten | 4.5*10^-3*Ω/Δ°C
# Lead | 4*10^-3*Ω/Δ°C | Vanadium | 3*10^-3*Ω/Δ°C
# Lithium | 5*10^-3*Ω/Δ°C | Zinc | 4*10^-3*Ω/Δ°C
# Magnesium | 3*10^-3*Ω/Δ°C | Zirconium | 4.4*10^-3*Ω/Δ°C
# Mercury | 9*10^-4*Ω/Δ°C
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# Data from CRC Handbook of Tables for Applied Engineering Science, 2nd edition, edited by R. Bolz and G. Tuve, CRC Press (1973).
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