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# PROPERTIES OF COMMON SOLIDS
# reference tables
# Density: Approximate, Average Values at Ordinary
# Atmospheric Temperature
# Material | Material
# Density (gm/cm^3) | Density (gm/cm^3)
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# Agate | 2.6 | Paper | 0.93
# Alabaster, carbonate | 2.73 | Paraffin | 0.89
# Alabaster, sulfate | 2.29 | Peat blocks | 0.84
# Albite | 2.64 | Pitch | 1.07
# Amber | 1.09 | Porcelain | 2.4
# Amphiboles | 3.1 | Porphyry | 2.8
# Anorthite | 2.75 | Pulp board | 0.19
# Asbestos | 2.4 | Pyrite | 5.0
# Asbestos slate | 1.8 | Quartz | 2.65
# Asphalt | 1.3 | Resin | 1.07
# Basalt | 2.7 | Rock salt | 2.18
# Beeswax | 0.97 | Rubber, hard | 1.19
# Beryl | 2.70 | Rubber, soft, commercial | 1.1
# Biotite | 2.9 | Rubber, soft, pure gum | 0.92
# Bone | 1.9 | Sandstone | 2.25
# Brick | 1.8 | Serpentine | 2.57
# Butter | 0.87 | Silica, fused transparent | 2.21
# Calamine | 4.3 | Silica, translucent | 2.07
# Calcspar | 2.7 | Slag | 2.9
# Camphor | 0.99 | Slate | 3.0
# Caoutchouc | 0.96 | Soapstone | 2.7
# Cardboard | 0.69 | Spermaceti | 0.95
# Celluloid | 1.4 | Starch | 1.53
# Cement, set | 2.9 | Sugar | 1.59
# Chalk | 2.4 | Talc | 2.8
# Charcoal, oak | 0.57 | Tallow, beef | 0.94
# Charcoal, pine | 0.36 | Tallow, mutton | 0.94
# Cinnabar | 8.12 | Tar | 1.02
# Clay | 2.2 | Topaz | 3.6
# Coal, anthracite | 1.6 | Tourmaline | 3.1
# Coal, bituminous | 1.4 | Wax, sealing | 1.8
# Cocoa butter | 0.90 | Wood:
# Coke | 1.4 | Alder | 0.55
# Copal | 1.09 | Apple | 0.75
# Cork | 0.24 | Ash | 0.75
# Cork linoleum | 0.54 | Balsa | 0.13
# Corundum | 4.0 | Bamboo | 0.36
# Diamond | 3.27 | Basswood | 0.46
# Dolomite | 2.84 | Beech | 0.80
# Ebonite | 1.15 | Birch | 0.64
# Emery | 4.0 | Blue gum | 1.00
# Epidote | 3.37 | Box | 1.06
# Feldspar | 2.65 | Butternut | 0.38
# Flint | 2.63 | Cedar | 0.53
# Fluorite | 3.18 | Cherry | 0.80
# Galena | 7.5 | Dogwood | 0.76
# Gamboge | 1.2 | Ebony | 1.22
# Garnet | 3.78 | Elm | 0.57
# Gas carbon | 1.88 | Hickory | 0.77
# Gelatin | 1.27 | Holly | 0.76
# Glass, common | 2.6 | Juniper | 0.56
# Glass, flint | 4.4 | Larch | 0.53
# Glue | 1.27 | Lignum vitae | 1.25
# Granite | 2.70 | Locust | 0.69
# Graphite | 2.51 | Logwood | 0.91
# Gum arabic | 1.35 | Mahogany, Honduras | 0.66
# Gypsum | 2.32 | Mahogany, Spanish | 0.85
# Hematite | 5.1 | Maple | 0.69
# Hornblende | 3.0 | Oak | 0.75
# Ice | 0.917 | Pear | 0.67
# Ivory | 1.88 | Pine, pitch | 0.84
# Leather, dry | 0.86 | Pine, white | 0.43
# Lime, slaked | 1.35 | Pine, yellow | 0.49
# Limestone | 2.72 | Plum | 0.72
# Linoleum | 1.18 | Poplar | 0.43
# Magnetite | 5.1 | Satinwood | 0.95
# Malachite | 3.9 | Spruce | 0.59
# Marble | 2.72 | Sycamore | 0.50
# Meerschaum | 1.14 | Teak, Indian | 0.77
# Mica | 2.9 | Teak, African | 0.98
# Muscovite | 2.88 | Walnut | 0.67
# Ochre | 3.5 | Water gum | 1.00
# Opal | 2.2 | Willow | 0.50
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# Data from CRC Handbook of Tables for Applied Engineering Science, 2nd edition, edited by R. Bolz and G. Tuve, CRC Press (1973).
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