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# PROPERTIES OF COMMON SOLIDS
# reference tables
# Specific Gravity
# Specific Gravity | Specific Gravity
# Material | Material
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# Asbestos cement board | 1.4 | Limestone | 2.5
# Asbestos millboard | 1.0 | Magnesia (85%) | 0.25
# Asphalt | 1.1 | Marble | 2.6
# Beeswax | 0.95 | Mica | 2.7
# Brick, common | 1.75 | Mineral wool blanket | 0.1
# Brick, hard | 2.0 | Paper | 0.9
# Chalk | 2.0 | Paraffin wax | 0.9
# Charcoal, wood | 0.4 | Plaster, light | 0.7
# Coal, anthracite | 1.5 | Plaster, sand | 1.8
# Coal, bituminous | 1.2 | Plastics, foamed | 0.2
# Concrete, light | 1.4 | Plastics, solids | 1.2
# Concrete, stone | 2.2 | Porcelain | 2.5
# Corkboard | 0.2 | Sandstone | 2.3
# Earth, dry | 1.4 | Sawdust | 0.15
# Fiberboard, light | 0.24 | Silica aerogel | 0.11
# Fiber hardboard | 1.1 | Vermiculite | 0.13
# Firebrick | 2.1 | Wood, balsa | 0.16
# Glass, window | 2.5 | Wood, oak | 0.7
# Gypsum board | 0.8 | Wood, white pine | 0.5
# Hairfelt | 0.1 | Wool, felt | 0.3
# Leather, dry | 0.9 | Wool, loose | 0.1
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# Data from CRC Handbook of Tables for Applied Engineering Science, 2nd edition, edited by R. Bolz and G. Tuve, CRC Press (1973).
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