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# PROPERTIES OF COMMON SOLIDS
# reference tables
# Specific Heat
# Material | Specific Heat | Material | Specific Heat
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# Asbestos cement board | 0.2*cal/(gm*K) | Limestone | 0.217*cal/(gm*K)
# Asbestos millboard | 0.2*cal/(gm*K) | Magnesia (85%) | 0.2*cal/(gm*K)
# Asphalt | 0.4*cal/(gm*K) | Marble | 0.21*cal/(gm*K)
# Beeswax | 0.82*cal/(gm*K) | Mica | 0.12*cal/(gm*K)
# Brick, common | 0.22*cal/(gm*K) | Paper | 0.33*cal/(gm*K)
# Brick, hard | 0.24*cal/(gm*K) | Paraffin wax | 0.69*cal/(gm*K)
# Chalk | 0.215*cal/(gm*K) | Plaster, light | 0.24*cal/(gm*K)
# Charcoal, wood | 0.24*cal/(gm*K) | Plaster, sand | 0.22*cal/(gm*K)
# Coal, anthracite | 0.3*cal/(gm*K) | Plastics, foamed | 0.3*cal/(gm*K)
# Coal, bituminous | 0.33*cal/(gm*K) | Plastics, solids | 0.4*cal/(gm*K)
# Concrete, light | 0.23*cal/(gm*K) | Porcelain | 0.22*cal/(gm*K)
# Concrete, stone | 0.18*cal/(gm*K) | Sandstone | 0.22*cal/(gm*K)
# Corkboard | 0.45*cal/(gm*K) | Sawdust | 0.21*cal/(gm*K)
# Earth, dry | 0.3*cal/(gm*K) | Silica aerogel | 0.2*cal/(gm*K)
# Fiberboard, light | 0.6*cal/(gm*K) | Vermiculite | 0.2*cal/(gm*K)
# Fiber hardboard | 0.5*cal/(gm*K) | Wood, balsa | 0.7*cal/(gm*K)
# Firebrick | 0.25*cal/(gm*K) | Wood, oak | 0.5*cal/(gm*K)
# Glass, window
0.2*cal/(gm*K)
# Wood,
# white pine
0.6*cal/(gm*K)
# Gypsum board | 0.26*cal/(gm*K) | Wool, felt | 0.33*cal/(gm*K)
# Hairfelt | 0.5*cal/(gm*K) | Wool, loose | 0.3*cal/(gm*K)
# Leather, dry | 0.36*cal/(gm*K)
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# Data from CRC Handbook of Tables for Applied Engineering Science, 2nd edition, edited by R. Bolz and G. Tuve, CRC Press (1973).
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