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# PROPERTIES OF COMMON SOLIDS
# reference tables
# Thermal Conductivity
# Thermal Conductivity | Thermal Conductivity
# Material | Material
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# Asbestos cement board | 0.607*watt/(m*K) | Marble | 2.6*watt/(m*K)
# Asbestos millboard | 0.14*watt/(m*K) | Mica | 0.71*watt/(m*K)
# Brick, common | 0.71*watt/(m*K) | Paper | 0.1*watt/(m*K)
# Brick, hard | 1.3*watt/(m*K) | Paraffin wax | 0.2*watt/(m*K)
# Chalk | 0.84*watt/(m*K) | Plaster, light | 0.2*watt/(m*K)
# Charcoal, wood | 0.088*watt/(m*K) | Plaster, sand | 0.71*watt/(m*K)
# Concrete, light | 0.42*watt/(m*K) | Plastics, foamed | 0.03*watt/(m*K)
# Concrete, stone | 1.7*watt/(m*K) | Plastics, solids | 0.19*watt/(m*K)
# Corkboard | 0.04*watt/(m*K) | Porcelain | 1.5*watt/(m*K)
# Earth, dry | 1.5*watt/(m*K) | Sandstone | 1.7*watt/(m*K)
# Fiberboard, light | 0.058*watt/(m*K) | Sawdust | 0.08*watt/(m*K)
# Fiber hardboard | 0.2*watt/(m*K) | Silica aerogel | 0.02*watt/(m*K)
# Firebrick | 1.4*watt/(m*K) | Vermiculite | 0.058*watt/(m*K)
# Glass, window | 0.96*watt/(m*K) | Wood, balsa | 0.050*watt/(m*K)
# Gypsum board | 0.17*watt/(m*K) | Wood, oak | 0.17*watt/(m*K)
# Hairfelt | 0.050*watt/(m*K) | Wood, white pine | 0.12*watt/(m*K)
# Leather, dry | 0.2*watt/(m*K) | Wool, felt | 0.071*watt/(m*K)
# Limestone | 1.9*watt/(m*K) | Wool, loose | 0.3*watt/(m*K)
# Magnesia (85%) | 0.071*watt/(m*K)
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# Data from CRC Handbook of Tables for Applied Engineering Science, 2nd edition, edited by R. Bolz and G. Tuve, CRC Press (1973).
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