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# PROPERTIES OF COMMON SOLIDS
# reference tables
# Dielectric Constant at room temperature and standard conditions (at 1 MHz)
# Note:  The following table gives relative dielectric constants of common solids. The actual dielectric constant can be obtained by multiplying the relative dielectric constant of the material by the dielectric constant of vacuum ε_0 (see the Table of Fundamental Physical Constants). For example:
ε_0 := 8.854187817*10^-12*farad/m
ε_asphalt := 2.58*ε_0
ε_asphalt = 2.28438e-11 s^4*A^2/(kg*m^3)
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# Material | Constant
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# Aluminum oxide | 8.80
# Asbestos fiber | 3.1
# Asphalt | 2.58
# Beeswax, yellow | 2.53
# Lucite | 2.63
# Magnesium oxide | 9.65
# Mica, ruby | 5.4
# Neoprene | 6.26
# Nylon 66 | 3.33
# Plexiglass | 2.76
# Polycarbonate | 3.02
# Polyester, cast resin, rigid | 2.8 | to | 4.1
# Polyethylene | 2.35
# Polypropylene | 2.25
# Porcelain (dry process) | 5.08
# Rubber, modified, isomerized | 2.4 | to | 2.7
# Shellac, natural | 3.47
# Teflon FEP | 2.1
# Urea-formaldehyde | 6.0
# Vinylite QYNA | 2.88
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# Data from CRC Handbook of Tables for Applied Engineering Science, 2nd edition, edited by R. Bolz and G. Tuve, CRC Press (1973).
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