# Modelling the Ocean
# When watching the ocean it's obvious that the sea is not a single sinusodial wave but a combination af many waves with different speeds, amplitudes, directions and wavelengths.
# It seems that the sea surface evolves almost randomly when looking at a specific point of the ocean.
#
# However, the ocean can be modelled as a sum of simple sinusodial waves with different heights, lengths and directions.
# To illustrate the idea let's add two simple sine waves with slightly different wavelength:
f_1(x) := sin(x)
f_2(x) := sin(1.1*x)
f(x) := f_1(x) + f_2(x)
# [plot: f_1(x) vs x]
# [plot: f_2(x) vs x]
# [plot: f(x) vs x]
# Comparing the resulting wave with the originals shows that the resulting wave has extremal values when the two sinusodial waves are in phase whilst the resulting wave almost vanishes when the two sinusodial waves are out of phase. This is easily seen if we plot the three curves in the same coordinate system
# [plot: f_1(x), f_2(x), f(x) vs x]
# So by adding two simple sinusodial waves we get a rather complicated wave. Keeping the same idea we can add a large number of simple sinusodial waves with different heights, wavelengths and directions to build the sea surface.
# Mathematically, this can be expressed as
η(x, t) == sum(a_j*sin(k_j*x - ω_j*t + θ_j), j = 1 .. N)
# where
#
# η(x, t)= Sea surface elevation at a point which is at a horisontal distance x from any
# chosen origin and at time t.
#
# N = number of waves being added
#
# a_j = amplitude of the jth wave
#
# k_j= wave number of the j'th wave
#
# ω_j = circular frequency
#
# θ_j = Phase of the j'th wave assumed to be uniformly distributed over [-π,π]
# The deep water characteristics of a simple wave is:
# wave period | T
# wave length
λ == g*T^2/(2*π)
# wave speed
v == λ/T == g*T/(2*π)
# cyclic frequency
f == 1/T
# circular frequency
ω == 2*π/T
# The power spectrum
# Adding a large number of simple sinusodial waves will result in a wave which is completely impossible to predict in shape and it will never repeat it's pattern from one interval to another. Thus we cannot characterize the sea by pattern or shape.
#
# If - at some time - all or most of the simple sinusodial waves are in phase a monster wave could occur. This happened on New Years Day 1995 in the North Sea - and it was even recorded:
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# In that 'sea-state' with significant wave height 12 m (measured from crest to trough) a monster wave of height 18.5 meters over still water was recorded.
# There is, however, a way to characterize the sea in simple terms:
#
# It's total energy must be made up of sum of the energies from the simple sinusodial waves that make up the sea.
# The energy of a simple sinusodial wave pr. unit square is proportional to the wave height H squared, so the total energy of the sea is
E == 1/16*ρ*g*sum(H_j^2*∝*sum(H_j^2, j = 1 .. N), j = 1 .. N)
# where ρ is the density of water, g gravity and H_j is the height of the j'th wave.
# For each wave component of different frequency we can plot the energy in that component against it's frequency.
# The resulting plot will show how the total energy of the sea is distributed according to the frequencies of the various components. This distribution is called the wave spectrum.
# Ocean waves are created by the wind. Wind starts blowing over the surface and forms tiny waves. On a rough surface, grip is larger, and more wind energy is transmitted to the ocean. As the wind continues to blow, longer and longer waves are generated until finally some equilibrium state is reached, where no further effect is produced. This equilibrium state is called 'the fully developed sea'.
# The graph below shows the wave spectrum of a fully developed sea for different wind speeds (measured 19.5 meters over sea surface).
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# The ordinate of the curves is expressed in 'square meter pr. Hertz' which is the same as 'square meter seconds'. We could as well have used 'Joule seconds' as the energy pr square meter is directly proportional with the wave height squared.
# This artificial unit is conveniently selected so that the area below the spectrum curve represents the total energy.
# Parametric spectra
# Parametric spectra models are empirical expressions that have been developed to fit measurements. They often include user defined parameters for wind speed and fetch (i.e. the distance over which the wind blows with constant velocity)
#
# The base of modern parametric wave spectra was found by Phillips (1957) and has the form:
α := 0.0081
S_P(f) := α*g^2/(2*π*f)^5
# Taking the wind speed into account, Pierson and Moskowitz (1964) found an expression that describes a fully developed sea with an infinite fetch:
S_PM(f) == S_P(f)*e^(-5/4*(f_p/f)^4)
# where f_p is the peak frequency of the spectrum. The typical value of the peak frequency is
f_p == 0.136*g/U_10
# where U_10 is the wind speed at a height of 10 meters over the sea surface.
# In order to plot the Pierson and Moskowitz spectrum for several wind speeds we define the functions
f_p(u) := 0.136*g/u
S_PM(f, u) := S_P(f)*e^(-5/4*(f_p(u)/f)^4)
# Plot range:
freq := 0*1/s, 0.001*1/s .. 0.25*1/s
# [plot: S_PM(freq, 10*m/s), S_PM(freq, 15*m/s), S_PM(freq, 20*m/s) vs freq]
# For a sea with limited fetch, where waves continue to grow, the JONSWAP spectrum (1973) has been found more appropriate.
# Basicly it is the Pierson and Moskowitz spectrum with an additional factor:
S_J(f) == S_PM(f)*γ^r
# where
r == exp(-(f - f_p)^2/(2*σ*f_p^2))
# γ is the so called 'peak enhancement factor' and σ controls the width of the peak.
#
# The parameter values for this spectrum are (F is the fetch and U_10 the wind speed at a height of 10 meters over the sea surface)
f_p == 2.84*g^0.7*F^-0.3*U_10^-0.4
α == 0.112*(f_p*U_10/g)^(2/3)
γ == 3.3
σ == 0.07
# if
f ≤ f_p
σ == 0.09
# if
f ≥ f_p
# To define the JONSWAP spectrum as a function of frequency, wind speed at 10 m and fetch we must parametrize the the expressions:
f_p(F, U_10) := 2.84*g^0.7*F^-0.3*U_10^-0.4
α(F, U_10) := 0.112*(f_p(F, U_10)*U_10/g)^(2/3)
σ(f, F, U_10) := if(f ≤ f_p(F, U_10), 0.07, 0.09)
γ := 3.3
S(f, F, U_10) := α(F, U_10)*g^2/(2*π*f)^5*e^(-5/4*(f_p(F, U_10)/f)^4)*γ^(e^(-(f - f_p(F, U_10))^2/(2*f_p(F, U_10)^2*σ(f, F, U_10)^2)))
# By fixing the wind speed to say 16m/s, we can study the infuence of the fetch
# [plot: S(freq, 400*km, 16*m/s) (m^2*s), S(freq, 200*km, 16*m/s), S(freq, 100*km, 16*m/s) vs freq]
# Integrating the spectrum
# The integration of the wave spectrum involving different powers of the wave frequencies yields important design statistics such as significant wave height and mean period of all the waves (average zero crossing period).
#
# Traditionally the significant wave height is defined as the mean wave height (from trough to crest) of highest third of the waves. Nowadays it's defined as
H_s == 4*sqrt(m_0)
# where m_0 is the 0'th moment of the wave spectrum S
m_0 == integral(S(f), f = 0 .. ∞)
# The 2'nd spectral moment is used for calculation of the average zero crossing period
T_z == sqrt(m_0/m_2)
# where
m_2 == integral(f^2*S(f), f = 0 .. ∞)
# For example, the JONSWAP spectral density with  L = 200 km and  U_10 = 16 m/s, the significant wave height H_s and the average zero crossing period T_z are calculated as
m_0 := integral(S(f, 200 km, 16 m/s), f = 0*s^-1 .. ∞*s^-1) = 0.561428 m^2
H_s := 4*sqrt(m_0) = 2.99714 m
m_2 := integral(f^2*S(f, 200 km, 16 m/s), f = 0*s^-1 .. ∞*s^-1) = 0.0131483 m^2/s^2
T_z := sqrt(m_0/m_2) = 6.53449 s
# The  parameters α and f_p of the JONSWAP spectrum were defined using empirical formulas based on measurements of the fetch and the wind speed at 10 m meters over the sea surface:
f_p == 2.84*g^0.7*F^-0.3*U_10^-0.4
α == 0.112*(f_p*U_10/g)^(2/3)
# Instead of using these formulas, we could scale the parameters α and f_p to result in say
H_s == 4 m
# and
T_z == 8 s
# To do this, we must parametrize the JONSWAP spectral density function with respect to α and f_p. Furthermore the two moments m_0 and m_2 must be regarded as functions of α and f_p.
#
# All this can be done in a single solve-block:
solve block
    # guess values
    α := 0.1
    f_p := 0.1 s^-1
    γ := 3.3
    σ(f, f_p) := if(f ≤ f_p, 0.07, 0.09)
    S(f, α, f_p) := α*g^2/(2*π*f)^5*e^(-5/4*(f_p/f)^4)*γ^(e^(-(f - f_p)^2/(2*f_p^2*σ(f, f_p)^2)))
    m_0(α, f_p) := integral(S(f, α, f_p), f = 0*s^-1 .. ∞*s^-1)
    m_2(α, f_p) := integral(f^2*S(f, α, f_p), f = 0*s^-1 .. ∞*s^-1)
    # constraints
    4*sqrt(m_0(α, f_p)) == H_s
    sqrt(m_0(α, f_p)/m_2(α, f_p)) == T_z
    # solver
    estimate_parameters(H_s, T_z) := find(α, f_p)
    # Starting values
end solve block
# So design a JONSWAP spectrum with significant wave height of 4 m and an 8 s average zero crossing period, we just need to call the solve-block:
estimate_parameters(4 m, 8 s) = [0.0297711; 0.0971752 1/s]
# Simulating the ocean
# In this section we shall build a simulation of the sea based on the JONSWAP wave spectrum with parameters
H_s == 4*m
T_z == 8*s
# From the last section we have
[α; f_p] := estimate_parameters(4 m, 8 s) = [0.0297711; 0.0971752 1/s]
γ := 3.3
σ(f) := if(f ≤ f_p, 0.07, 0.09)
S(f) := α*g^2/(2*π*f)^5*e^(-5/4*(f_p/f)^4)*γ^(e^(-(f - f_p)^2/(2*f_p^2*σ(f)^2)))
# [plot: S(freq) vs freq]
# To simulate a sea state we must add a large number of sinosodial waves
η(x, t) == sum(a_j*sin(k_j*x - ω_j*t + θ_j), j = 1 .. N)
# The amplitudes are related to a statistical function called the Spectral Density Function by the relationship:
a_j == sqrt(2*S(f)*Δf)
# For that a Δf has to be selected, say:
Δf := 1/(400 s) = 0.0025 1/s
# which corresponds to 50 peak periods as the average zero crossing period is 8. The discrete spectrum of the amplitudes is:
j := 1 .. 50
f[j] := j*Δf
a(f) := sqrt(2*S(f)*Δf)
# [plot: a(f[j]) vs f[j]]
# The wave number k_j can be calculated as
k_j == 2*π/λ_j == 2*π/(g/(2*π*f_j^2)) == (2*π*f_j)^2/g
k[j] := (2*π*f[j])^2/g
# and the circular frequency as
ω[j] := 2*π*f[j]
# Finally we pick the phases θ from a uniform distribution over the interval [-π,π]
θ := runif(50, -π, π)
η(x, t) := sum(a(f[j])*sin(k[j]*x - ω[j]*t + θ[j - 1]), j = 1 .. 50)
t := 0 s, 1 s .. 300 s
# [plot: η(0*m, t) vs t]
# 3D plot of part of the wave
# [3D plot: η(x*m, y*s)]
