# Visualisation of typical Wellbore survey data in Mathcad
ORIGIN := 0
# Drill data imported from Excel and saved in Mathcad using the Excel component
# [Excel component]
    data := excel["Sheet1!A2:C125"]
# To use the data in Mathcad apply Matrix column operator to assign each column of data to a vector variable
depth := (-data)[:, 0]
inc := data[:, 1]
Azimuth := data[:, 2]
data := submatrix(welldata, 54, 170, 0, 2)  # disabled
# Example of functions to be used to define the x and y distances traveled between points of data
dist(inc, depth, n) := tan(inc[n]*deg)*(depth[n] - depth[n - 1])
x(Azmuth, inc, depth, n) := cos(Azmuth[n])*dist(inc, depth, n)
y(Azmuth, inc, depth, n) := sin(Azmuth[n])*dist(inc, depth, n)
# Mathcad program that converts real world coordinates to Cartesian form
Coords(depth, inc, Azimuth) :=
    for i ∈ 0 .. rows(depth) - 1
        if i == 0
            X[0] ← 0
            Y[0] ← 0
        else
            dist ← tan(inc[i]*deg)*(depth[i] - depth[i - 1])
            xchange ← cos(Azimuth[i]*deg)*dist
            ychange ← sin(Azimuth[i]*deg)*dist
            X[i] ← X[i - 1] + xchange
            Y[i] ← Y[i - 1] + ychange
    ALL[:, 0] ← X
    ALL[:, 1] ← Y
    return ALL
# Program Notes:
# - Program loops from 0 to the end of the datalist this
# allows the use of i as the index to the vector
# - for i = 0 setup the initial contitions
# - for i > 1 calculate first the horizontal distance traveled
# between the points using the change in depth
# (depth_i - depth_(i-1) ) and the incline angle
# - Then using the Azimuth angle and the calculated dist
# to calculate the change in x and change in y
# - Finally create a matrix containing both X and Y with
# the summation of points upto i for each index of i
Coords(depth, inc, Azimuth) = [
    0, 0;
    0, 0;
    -0.548023, 0.139486;
    -0.816536, 0.265724;
    -0.827264, 0.232507;
    -0.707814, 0.206855;
    -0.682058, 0.344085;
    -0.333081, 0.780147;
    -0.228354, 1.02009;
    -0.0809041, 1.39345
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]
x := Coords(depth, inc, Azimuth)[:, 0]
y := Coords(depth, inc, Azimuth)[:, 1]
Sea(a, b) := 1500 + (30*sin(b))  # Add a simple function to create flat sea with waves
Bed(a, b) := 0 + rnd(8)*a/12 - b/7 + 100*sin(b)
# function with slope for sea bed
# a matrix for the last point of the drilling
M[0, 0] := x[last(x)]
M[0, 1] := y[last(x)]
M[0, 2] := depth[last(x)]
M = [3719.43, 4988.52, -12000]
# [3D plot: [x; y; depth], CreateMesh(Sea, 0, 4000, 0, 4000, 21), CreateMesh(Bed, 0, 4000, 0, 4000, 51)]
# Visualisation of well bore drill path
# Sea
# Bedrock
# Drill target
